**
** ABAQUS Input Deck Generated by HyperMesh Version  : 2022.0.0.33
** Generated using HyperMesh-Abaqus Template Version : 2022.0.0.33
** Generated on 04-29-2024 at 11:42:19
**
**   Template:  ABAQUS/STANDARD 3D
**
*NODE
         3,  0.0            ,  -3.69017317E-13,  -2.71170936E-31
         4,  50.0           ,  50.000000000369,  -1.85962357E-16
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**HW_COMPONENT     ID=1     COLOR=7     NAME=plate_100_100     PROPERTY=shell_al_1mm
*ELEMENT,TYPE=S8R5
         1,       203,       208,       211,       201,       207,       210,       213,       202
         2,       201,       211,       194,       196,       213,       212,       195,       200
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*ELSET, ELSET=HMprop_shell_al_1mm
         1,         2,         3,         4,         5,         6
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**HM_set_by_property     7          1
*SHELL SECTION, ELSET=HMprop_shell_al_1mm, MATERIAL=material_AL
1.0       ,
**HMNAME MATS          1 material_AL     6
*MATERIAL, NAME=material_AL
*DENSITY
2.7000E-09,0.0
*ELASTIC, TYPE = ISOTROPIC
72000.0   ,0.33      ,0.0
**HMNAME LOADSTEP          1 step_1
*STEP
*STATIC
**HWNAME LOADCOL          1 fix
**HWCOLOR LOADCOL          1    39
*BOUNDARY
68,1,6,0.0
69,1,6,0.0
70,1,6,0.0
71,1,6,0.0
72,1,6,0.0
73,1,6,0.0
74,1,6,0.0
75,1,6,0.0
76,1,6,0.0
77,1,6,0.0
78,1,6,0.0
79,1,6,0.0
80,1,6,0.0
81,1,6,0.0
82,1,6,0.0
83,1,6,0.0
84,1,6,0.0
85,1,6,0.0
86,1,6,0.0
87,1,6,0.0
88,1,6,0.0
89,1,6,0.0
90,1,6,0.0
91,1,6,0.0
92,1,6,0.0
93,1,6,0.0
94,1,6,0.0
95,1,6,0.0
96,1,6,0.0
97,1,6,0.0
98,1,6,0.0
99,1,6,0.0
100,1,6,0.0
**HWNAME LOADCOL          2 nodeforce
**HWCOLOR LOADCOL          2    11
*CLOAD
20,3,1.0
*OUTPUT, FIELD, VARIABLE = PRESELECT
*END STEP
*****
